n := 50
i := 0 .. n - 1  # Грубая погрешность
# Выборочное среднее
a[i] := 87, 34, 64, 56, 74, 65, 64, 69, 59, 70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
h := mean(a)
# Медиана
p := median(a)
p = 59
f := 111
h = 55.98
# Мода
u := mode(a)  # error: Многомодальный — больше одного значения встречается с наибольшей частотой.
u =  # error: Эта переменная не определена.
# Несмещенная оценка СКО
# Максимальное значение
o := max(a)
o = 87
r := Stdev(a)
r = 19.1295
# Минимальное значение
y := min(a)
y = 24
a = [
    87; 34; 64; 56; 74; 65; 64; 69; 59; 70
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]
# Значение t
t := |f - h|/r
t = 2.87618
# Размах вариации
w := o - y
w = 63
# Количество уровней значимости
k := 49
# Дисперсия выборки
q := Var(a)
q = 365.938
# Критерии Стьюдента
kr_st1 := qt(0.975, k)
# Стандартное отклонение
d := stdev(a)
d = 18.9373
kr_st2 := qt(0.95, k)
kr_st1 = 2.00958
# Коэффициэнт ассиметрии
z := skew(a)
z = -0.0681439
kr_st2 = 1.67655
# Поскольку значение t больше kr_st1 и kr_st2 то
# Коэффициент эксцесса
x := kurt(a)
x = -1.06706
# значение f=108 - являеться выбросом
# Стандартная ошибка
st_eror := d/sqrt(50)  # st_eror
# Сумма значений выборки
sum(a) = 2799
